ORIGIN := 1
Xw := [0, 50]
Yw := [0, 30]
m := 5  # -число подобластей
X :=
    for i ∈ 1 .. cols(Xw)
        for j ∈ 1 .. cols(Xw)*cols(Yw)
            k ← trunc((j - 1)/cols(Yw)) + 1
            X[j] ← transpose(Xw)[k]
        V ← stack(V, transpose(Yw))
    for i ∈ 2 .. cols(Xw)*cols(Yw) + 1
        J[i - 1] ← V[i]
    augment(X, J)
SOD :=
    for i ∈ 1 .. 5
        for j ∈ 1 .. m
            S[i, 1] ← i
            S[i, 2] ← i
            S[i, 3] ← S[i, 2] + 4
            S[i, 4] ← S[i, 3] + 1
            S[i, 5] ← S[i, 4] - 4
    S
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X = [0, 0; 0, 30; 50, 0; 50, 30]
SOD = [1, 1, 5, 6, 2; 2, 2, 6, 7, 3; 3, 3, 7, 8, 4; 4, 4, 8, 9, 5; 5, 5, 9, 10, 6]
SOD := [1, 1, 5, 6, 2; 2, 2, 6, 7, 3; 3, 3, 7, 8, 4; 4, 5, 9, 10, 6; 5, 7, 11, 12, 8]
FX :=
    for i ∈ 1 .. m
        for j ∈ 1 .. 4
            FXS[i, j] ← X[:, 1][SOD[i, j + 1]]
            FXS[i, 5] ← FXS[i, 1]
            FXS[i, 6] ← sqrt(-1)
    FXS  # error: This array index is invalid for this array.
FY :=
    for i ∈ 1 .. m
        for j ∈ 1 .. 4
            FYS[i, j] ← X[:, 2][SOD[i, j + 1]]
            FYS[i, 5] ← FYS[i, 1]
            FYS[i, 6] ← sqrt(-1)
    FYS  # error: This array index is invalid for this array.
X = [0, 0; 0, 30; 50, 0; 50, 30]
Prog(M) :=
    k ← 1
    for i ∈ 1 .. rows(M)
        for j ∈ 1 .. cols(M)
            V[k] ← M[i, j]
            k ← k + 1
    V
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nodes := READPRN("nodes.txt")
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(145 - 150)^2 + (41.33975 - 50)^2 = 99.9999
elements := READPRN("elements.txt")
m := rows(elements) = 42  # - число элементов
n := rows(nodes) = 60
ORIGIN := 1
FX :=
    for i ∈ 1 .. m
        for j ∈ 1 .. 4
            FX[i, j] ← nodes[:, 2][elements[i, j + 1]]
            FX[i, 4] ← FX[i, 3] if j == 3
            FX[i, 5] ← FX[i, 1]
            FX[i, 6] ← sqrt(-1)
    FX
FY :=
    for i ∈ 1 .. m
        for j ∈ 1 .. 4
            FY[i, j] ← nodes[:, 3][elements[i, j + 1]]
            FY[i, 4] ← FY[i, 3] if j == 3
            FY[i, 5] ← FY[i, 1]
            FY[i, 6] ← sqrt(-1)
    FY
nodes = [
    1, 0, 0;
    2, 46.6667, 0;
    3, 93.3333, 0;
    4, 140, 0;
    5, 144, 0;
    6, 150, 0;
    7, 0, 13.3333;
    8, 46.6667, 13.3333;
    9, 93.3333, 13.3333;
    10, 140, 13.3333
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]
elements = [
    1, 1, 2, 8, 7;
    2, 2, 3, 9, 8;
    3, 3, 4, 10, 9;
    4, 4, 5, 11, 10;
    5, 5, 6, 12, 11;
    6, 7, 8, 14, 13;
    7, 8, 9, 15, 14;
    8, 9, 10, 16, 15;
    9, 10, 11, 17, 16;
    10, 11, 12, 18, 17
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]
Prog(M) :=
    k ← 1
    for i ∈ 1 .. rows(M)
        for j ∈ 1 .. cols(M)
            G[k] ← M[i, j]
            k ← k + 1
    G
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nodes1 := READPRN("nodes.txt")
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nodes1 = [
    1, 0, 0;
    2, 46.6667, 0;
    3, 93.3333, 0;
    4, 140, 0;
    5, 144, 0;
    6, 150, 0;
    7, 0, 13.3333;
    8, 46.6667, 13.3333;
    9, 93.3333, 13.3333;
    10, 140, 13.3333
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]
elements1 := READPRN("elements.txt")
m1 := rows(elements1) = 42  # - число элементов после удаления подобласти
rows(nodes1) = 60  # - число узлов после удаления подобласти
ORIGIN := 1
FX :=
    for i ∈ 1 .. m1
        for j ∈ 1 .. 4
            FX[i, j] ← nodes1[:, 2][elements1[i, j + 1]]
            FX[i, 4] ← FX[i, 1] if j == 3
            FX[i, 5] ← FX[i, 1]
            FX[i, 6] ← sqrt(-1)
    FX
FY :=
    for i ∈ 1 .. m1
        for j ∈ 1 .. 4
            FY[i, j] ← nodes1[:, 3][elements1[i, j + 1]]
            FY[i, 4] ← FY[i, 3] if j == 3
            FY[i, 5] ← FY[i, 1]
            FY[i, 6] ← sqrt(-1)
    FY
nodes1 = [
    1, 0, 0;
    2, 46.6667, 0;
    3, 93.3333, 0;
    4, 140, 0;
    5, 144, 0;
    6, 150, 0;
    7, 0, 13.3333;
    8, 46.6667, 13.3333;
    9, 93.3333, 13.3333;
    10, 140, 13.3333
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]
elements1 = [
    1, 1, 2, 8, 7;
    2, 2, 3, 9, 8;
    3, 3, 4, 10, 9;
    4, 4, 5, 11, 10;
    5, 5, 6, 12, 11;
    6, 7, 8, 14, 13;
    7, 8, 9, 15, 14;
    8, 9, 10, 16, 15;
    9, 10, 11, 17, 16;
    10, 11, 12, 18, 17
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]
Prog(M) :=
    k ← 1
    for i ∈ 1 .. rows(M)
        for j ∈ 1 .. cols(M)
            G[k] ← M[i, j]
            k ← k + 1
    G
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FX = [
    0, 46.6667, 46.6667, 0, 0, 1i;
    46.6667, 93.3333, 93.3333, 46.6667, 46.6667, 1i;
    93.3333, 140, 140, 93.3333, 93.3333, 1i;
    140, 144, 144, 140, 140, 1i;
    144, 150, 150, 144, 144, 1i;
    0, 46.6667, 46.6667, 0, 0, 1i;
    46.6667, 93.3333, 93.3333, 46.6667, 46.6667, 1i;
    93.3333, 140, 140, 93.3333, 93.3333, 1i;
    140, 144, 144, 140, 140, 1i;
    144, 150, 150, 144, 144, 1i
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]
FY = [
    0, 0, 13.3333, 13.3333, 0, 1i;
    0, 0, 13.3333, 13.3333, 0, 1i;
    0, 0, 13.3333, 13.3333, 0, 1i;
    0, 0, 13.3333, 13.3333, 0, 1i;
    0, 0, 13.3333, 13.3333, 0, 1i;
    13.3333, 13.3333, 26.6667, 26.6667, 13.3333, 1i;
    13.3333, 13.3333, 26.6667, 26.6667, 13.3333, 1i;
    13.3333, 13.3333, 26.6667, 26.6667, 13.3333, 1i;
    13.3333, 13.3333, 26.6667, 26.6667, 13.3333, 1i;
    13.3333, 13.3333, 26.6667, 26.6667, 13.3333, 1i
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]
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global_stiffness_matrix := READPRN("out_stiffness_matrix.txt")
global_load_vector := READPRN("out_loads_vec.txt")
GSM := global_stiffness_matrix
GLV := global_load_vector
# сумма элементов строки или столбца матрицы должна быть равна нулю
sum :=
    for i ∈ 1 .. rows(GSM)
        sum[i] ← sum(GSM[i, j], j = 1 .. cols(GSM))
    sum
GSM =  # no stored result
GLV =  # no stored result
sum =  # no stored result
sum(GLV[i], i = 1 .. rows(GLV)) = -400  # Н
u := READPRN("u.txt")  # вектор перемещений, полученный с помощью PARDISO
# Аналитика:
a := 150  # мм
b := 100  # мм
q := 1000  # Н/мм
t := 3  # мм
E := 2.1*10^5  # МПа
σ := q*b/(t*b) = 333.333  # МПа
|GSM| = Infinity
disp := GSM^-1*GLV
scale := 20000
u_an := a*σ/E = 0.238095
NEW_COORDS :=
    n ← rows(nodes)
    for i ∈ 1 .. n
        res[i, 2] ← nodes[i, 2] + scale*u[2*i - 1]
        res[i, 3] ← nodes[i, 3] + scale*u[2*i - 0]
        res[i, 1] ← i
    res
NEW_COORDS = [
    1, -14.7689, 1.45093;
    2, 36.3434, 1.37888;
    3, 87.6274, 1.35785;
    4, 139.043, 1.71111;
    5, 143.426, 1.73076;
    6, 150, 1.74116;
    7, -14.7459, 14.4028;
    8, 36.3586, 14.3333;
    9, 87.5452, 14.2835;
    10, 138.977, 14.6351
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]
disp =  # no stored result
u = [
    -0.000738445; 7.25466e-5; -0.000516163; 6.89442e-5; -0.000285293; 6.78927e-5; -4.78527e-5; 8.55557e-5; -2.86993e-5; 8.65382e-5
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]
FXn :=
    for i ∈ 1 .. m1
        for j ∈ 1 .. 4
            FX[i, j] ← NEW_COORDS[:, 2][elements[i, j + 1]]
            FX[i, 4] ← FX[i, 3] if j == 3
            FX[i, 5] ← FX[i, 1]
            FX[i, 6] ← sqrt(-1)
    FX
FYn :=
    for i ∈ 1 .. m1
        for j ∈ 1 .. 4
            FY[i, j] ← NEW_COORDS[:, 3][elements1[i, j + 1]]
            FY[i, 4] ← FY[i, 3] if j == 3
            FY[i, 5] ← FY[i, 1]
            FY[i, 6] ← sqrt(-1)
    FY
Prog(M) :=
    k ← 1
    for i ∈ 1 .. rows(M)
        for j ∈ 1 .. cols(M)
            G[k] ← M[i, j]
            k ← k + 1
    G
data := READPRN("graph_data/x_stress_data.txt")
y := data[:, 1]
KKN := data[:, 2]
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nodes = [
    1, 0, 0;
    2, 46.6667, 0;
    3, 93.3333, 0;
    4, 140, 0;
    5, 144, 0;
    6, 150, 0;
    7, 0, 13.3333;
    8, 46.6667, 13.3333;
    9, 93.3333, 13.3333;
    10, 140, 13.3333
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]
NEW_COORDS = [
    1, -14.7689, 1.45093;
    2, 36.3434, 1.37888;
    3, 87.6274, 1.35785;
    4, 139.043, 1.71111;
    5, 143.426, 1.73076;
    6, 150, 1.74116;
    7, -14.7459, 14.4028;
    8, 36.3586, 14.3333;
    9, 87.5452, 14.2835;
    10, 138.977, 14.6351
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]
FX = [
    0, 46.6667, 46.6667, 0, 0, 1i;
    46.6667, 93.3333, 93.3333, 46.6667, 46.6667, 1i;
    93.3333, 140, 140, 93.3333, 93.3333, 1i;
    140, 144, 144, 140, 140, 1i;
    144, 150, 150, 144, 144, 1i;
    0, 46.6667, 46.6667, 0, 0, 1i;
    46.6667, 93.3333, 93.3333, 46.6667, 46.6667, 1i;
    93.3333, 140, 140, 93.3333, 93.3333, 1i;
    140, 144, 144, 140, 140, 1i;
    144, 150, 150, 144, 144, 1i
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]
FXn = [
    -14.7689, 36.3434, 36.3586, -14.7459, -14.7689, 1i;
    36.3434, 87.6274, 87.5452, 36.3586, 36.3434, 1i;
    87.6274, 139.043, 138.977, 87.5452, 87.6274, 1i;
    139.043, 143.426, 143.394, 138.977, 139.043, 1i;
    143.426, 150, 150, 143.394, 143.426, 1i;
    -14.7459, 36.3586, 36.3737, -14.729, -14.7459, 1i;
    36.3586, 87.5452, 87.4039, 36.3737, 36.3586, 1i;
    87.5452, 138.977, 138.876, 87.4039, 87.5452, 1i;
    138.977, 143.394, 143.312, 138.876, 138.977, 1i;
    143.394, 150, 150, 143.312, 143.394, 1i
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]
FY = [
    0, 0, 13.3333, 13.3333, 0, 1i;
    0, 0, 13.3333, 13.3333, 0, 1i;
    0, 0, 13.3333, 13.3333, 0, 1i;
    0, 0, 13.3333, 13.3333, 0, 1i;
    0, 0, 13.3333, 13.3333, 0, 1i;
    13.3333, 13.3333, 26.6667, 26.6667, 13.3333, 1i;
    13.3333, 13.3333, 26.6667, 26.6667, 13.3333, 1i;
    13.3333, 13.3333, 26.6667, 26.6667, 13.3333, 1i;
    13.3333, 13.3333, 26.6667, 26.6667, 13.3333, 1i;
    13.3333, 13.3333, 26.6667, 26.6667, 13.3333, 1i
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]
FYn = [
    1.45093, 1.37888, 14.3333, 14.4028, 1.45093, 1i;
    1.37888, 1.35785, 14.2835, 14.3333, 1.37888, 1i;
    1.35785, 1.71111, 14.6351, 14.2835, 1.35785, 1i;
    1.71111, 1.73076, 14.6748, 14.6351, 1.71111, 1i;
    1.73076, 1.74116, 14.7052, 14.6748, 1.73076, 1i;
    14.4028, 14.3333, 27.308, 27.3455, 14.4028, 1i;
    14.3333, 14.2835, 27.2089, 27.308, 14.3333, 1i;
    14.2835, 14.6351, 27.5266, 27.2089, 14.2835, 1i;
    14.6351, 14.6748, 27.6418, 27.5266, 14.6351, 1i;
    14.6748, 14.7052, 27.6949, 27.6418, 14.6748, 1i
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]
(|u[1]| - |u[3]|)/|u[1]|*100 = 30.1013
