xx := [0; 150]
yy := [0; 100]
X1(x) := (xx[1] - x)/(xx[1] - xx[0])
X2(x) := (x - xx[0])/(xx[1] - xx[0])
Y1(y) := (yy[1] - y)/(yy[1] - yy[0])
Y2(y) := (y - yy[0])/(yy[1] - yy[0])
x_cur := xx[0]
y_cur := yy[1]
φ1(x, y) := X1(x)*Y1(y)
φ2(x, y) := X2(x)*Y1(y)
φ3(x, y) := X2(x)*Y2(y)
φ4(x, y) := X1(x)*Y2(y)
φ4(x_cur, y_cur) = 1
φ3(x_cur, y_cur) = 0
φ(x, y) := [φ1(x, y); φ2(x, y); φ3(x, y); φ4(x, y)]
φ1(x_cur, y_cur) = 0
φ2(x_cur, y_cur) = 0
Kx11
Kx12
Kx13
Kx14
Kx21
Kx22
Kx23
Kx24
Kx := [
    integral(integral((d/dx(φ(x, y)[0]))^2, x = xx[0] .. xx[1]), y = yy[0] .. yy[1]);
    integral(integral(d/dx(φ(x, y)[0])*d/dx(φ(x, y)[1]), x = xx[0] .. xx[1]), y = yy[0] .. yy[1]);
    integral(integral(d/dx(φ(x, y)[0])*d/dx(φ(x, y)[2]), x = xx[0] .. xx[1]), y = yy[0] .. yy[1]);
    integral(integral(d/dx(φ(x, y)[0])*d/dx(φ(x, y)[3]), x = xx[0] .. xx[1]), y = yy[0] .. yy[1]);
    integral(integral(d/dx(φ(x, y)[1])*d/dx(φ(x, y)[0]), x = xx[0] .. xx[1]), y = yy[0] .. yy[1]);
    integral(integral((d/dx(φ(x, y)[1]))^2, x = xx[0] .. xx[1]), y = yy[0] .. yy[1]);
    integral(integral(d/dx(φ(x, y)[1])*d/dx(φ(x, y)[2]), x = xx[0] .. xx[1]), y = yy[0] .. yy[1]);
    integral(integral(d/dx(φ(x, y)[1])*d/dx(φ(x, y)[3]), x = xx[0] .. xx[1]), y = yy[0] .. yy[1]);
    integral(integral(d/dx(φ(x, y)[2])*d/dx(φ(x, y)[0]), x = xx[0] .. xx[1]), y = yy[0] .. yy[1]);
    integral(integral(d/dx(φ(x, y)[2])*d/dx(φ(x, y)[1]), x = xx[0] .. xx[1]), y = yy[0] .. yy[1]);
    integral(integral((d/dx(φ(x, y)[2]))^2, x = xx[0] .. xx[1]), y = yy[0] .. yy[1]);
    integral(integral(d/dx(φ(x, y)[2])*d/dx(φ(x, y)[3]), x = xx[0] .. xx[1]), y = yy[0] .. yy[1]);
    integral(integral(d/dx(φ(x, y)[3])*d/dx(φ(x, y)[0]), x = xx[0] .. xx[1]), y = yy[0] .. yy[1]);
    integral(integral(d/dx(φ(x, y)[3])*d/dx(φ(x, y)[1]), x = xx[0] .. xx[1]), y = yy[0] .. yy[1]);
    integral(integral(d/dx(φ(x, y)[3])*d/dx(φ(x, y)[2]), x = xx[0] .. xx[1]), y = yy[0] .. yy[1]);
    integral(integral((d/dx(φ(x, y)[3]))^2, x = xx[0] .. xx[1]), y = yy[0] .. yy[1])
]
Ky := [
    integral(integral((d/dy(φ(x, y)[0]))^2, x = xx[0] .. xx[1]), y = yy[0] .. yy[1]);
    integral(integral(d/dy(φ(x, y)[0])*d/dy(φ(x, y)[1]), x = xx[0] .. xx[1]), y = yy[0] .. yy[1]);
    integral(integral(d/dy(φ(x, y)[0])*d/dy(φ(x, y)[2]), x = xx[0] .. xx[1]), y = yy[0] .. yy[1]);
    integral(integral(d/dy(φ(x, y)[0])*d/dy(φ(x, y)[3]), x = xx[0] .. xx[1]), y = yy[0] .. yy[1]);
    integral(integral(d/dy(φ(x, y)[1])*d/dy(φ(x, y)[0]), x = xx[0] .. xx[1]), y = yy[0] .. yy[1]);
    integral(integral((d/dy(φ(x, y)[1]))^2, x = xx[0] .. xx[1]), y = yy[0] .. yy[1]);
    integral(integral(d/dy(φ(x, y)[1])*d/dy(φ(x, y)[2]), x = xx[0] .. xx[1]), y = yy[0] .. yy[1]);
    integral(integral(d/dy(φ(x, y)[1])*d/dy(φ(x, y)[3]), x = xx[0] .. xx[1]), y = yy[0] .. yy[1]);
    integral(integral(d/dy(φ(x, y)[2])*d/dy(φ(x, y)[0]), x = xx[0] .. xx[1]), y = yy[0] .. yy[1]);
    integral(integral(d/dy(φ(x, y)[2])*d/dy(φ(x, y)[1]), x = xx[0] .. xx[1]), y = yy[0] .. yy[1]);
    integral(integral((d/dy(φ(x, y)[2]))^2, x = xx[0] .. xx[1]), y = yy[0] .. yy[1]);
    integral(integral(d/dy(φ(x, y)[2])*d/dy(φ(x, y)[3]), x = xx[0] .. xx[1]), y = yy[0] .. yy[1]);
    integral(integral(d/dy(φ(x, y)[3])*d/dy(φ(x, y)[0]), x = xx[0] .. xx[1]), y = yy[0] .. yy[1]);
    integral(integral(d/dy(φ(x, y)[3])*d/dy(φ(x, y)[1]), x = xx[0] .. xx[1]), y = yy[0] .. yy[1]);
    integral(integral(d/dy(φ(x, y)[3])*d/dy(φ(x, y)[2]), x = xx[0] .. xx[1]), y = yy[0] .. yy[1]);
    integral(integral((d/dy(φ(x, y)[3]))^2, x = xx[0] .. xx[1]), y = yy[0] .. yy[1])
]
Kx31
Kxy := [
    integral(integral(d/dx(φ(x, y)[0])*d/dy(φ(x, y)[0]), x = xx[0] .. xx[1]), y = yy[0] .. yy[1]);
    integral(integral(d/dx(φ(x, y)[0])*d/dy(φ(x, y)[1]), x = xx[0] .. xx[1]), y = yy[0] .. yy[1]);
    integral(integral(d/dx(φ(x, y)[0])*d/dy(φ(x, y)[2]), x = xx[0] .. xx[1]), y = yy[0] .. yy[1]);
    integral(integral(d/dx(φ(x, y)[0])*d/dy(φ(x, y)[3]), x = xx[0] .. xx[1]), y = yy[0] .. yy[1]);
    integral(integral(d/dx(φ(x, y)[1])*d/dy(φ(x, y)[0]), x = xx[0] .. xx[1]), y = yy[0] .. yy[1]);
    integral(integral(d/dx(φ(x, y)[1])*d/dy(φ(x, y)[1]), x = xx[0] .. xx[1]), y = yy[0] .. yy[1]);
    integral(integral(d/dx(φ(x, y)[1])*d/dy(φ(x, y)[2]), x = xx[0] .. xx[1]), y = yy[0] .. yy[1]);
    integral(integral(d/dx(φ(x, y)[1])*d/dy(φ(x, y)[3]), x = xx[0] .. xx[1]), y = yy[0] .. yy[1]);
    integral(integral(d/dx(φ(x, y)[2])*d/dy(φ(x, y)[0]), x = xx[0] .. xx[1]), y = yy[0] .. yy[1]);
    integral(integral(d/dx(φ(x, y)[2])*d/dy(φ(x, y)[1]), x = xx[0] .. xx[1]), y = yy[0] .. yy[1]);
    integral(integral(d/dx(φ(x, y)[2])*d/dy(φ(x, y)[2]), x = xx[0] .. xx[1]), y = yy[0] .. yy[1]);
    integral(integral(d/dx(φ(x, y)[2])*d/dy(φ(x, y)[3]), x = xx[0] .. xx[1]), y = yy[0] .. yy[1]);
    integral(integral(d/dx(φ(x, y)[3])*d/dy(φ(x, y)[0]), x = xx[0] .. xx[1]), y = yy[0] .. yy[1]);
    integral(integral(d/dx(φ(x, y)[3])*d/dy(φ(x, y)[1]), x = xx[0] .. xx[1]), y = yy[0] .. yy[1]);
    integral(integral(d/dx(φ(x, y)[3])*d/dy(φ(x, y)[2]), x = xx[0] .. xx[1]), y = yy[0] .. yy[1]);
    integral(integral(d/dx(φ(x, y)[3])*d/dy(φ(x, y)[3]), x = xx[0] .. xx[1]), y = yy[0] .. yy[1])
]
Kyx := [
    integral(integral(d/dy(φ(x, y)[0])*d/dx(φ(x, y)[0]), x = xx[0] .. xx[1]), y = yy[0] .. yy[1]);
    integral(integral(d/dy(φ(x, y)[0])*d/dx(φ(x, y)[1]), x = xx[0] .. xx[1]), y = yy[0] .. yy[1]);
    integral(integral(d/dy(φ(x, y)[0])*d/dx(φ(x, y)[2]), x = xx[0] .. xx[1]), y = yy[0] .. yy[1]);
    integral(integral(d/dy(φ(x, y)[0])*d/dx(φ(x, y)[3]), x = xx[0] .. xx[1]), y = yy[0] .. yy[1]);
    integral(integral(d/dy(φ(x, y)[1])*d/dx(φ(x, y)[0]), x = xx[0] .. xx[1]), y = yy[0] .. yy[1]);
    integral(integral(d/dy(φ(x, y)[1])*d/dx(φ(x, y)[1]), x = xx[0] .. xx[1]), y = yy[0] .. yy[1]);
    integral(integral(d/dy(φ(x, y)[1])*d/dx(φ(x, y)[2]), x = xx[0] .. xx[1]), y = yy[0] .. yy[1]);
    integral(integral(d/dy(φ(x, y)[1])*d/dx(φ(x, y)[3]), x = xx[0] .. xx[1]), y = yy[0] .. yy[1]);
    integral(integral(d/dy(φ(x, y)[2])*d/dx(φ(x, y)[0]), x = xx[0] .. xx[1]), y = yy[0] .. yy[1]);
    integral(integral(d/dy(φ(x, y)[2])*d/dx(φ(x, y)[1]), x = xx[0] .. xx[1]), y = yy[0] .. yy[1]);
    integral(integral(d/dy(φ(x, y)[2])*d/dx(φ(x, y)[2]), x = xx[0] .. xx[1]), y = yy[0] .. yy[1]);
    integral(integral(d/dy(φ(x, y)[2])*d/dx(φ(x, y)[3]), x = xx[0] .. xx[1]), y = yy[0] .. yy[1]);
    integral(integral(d/dy(φ(x, y)[3])*d/dx(φ(x, y)[0]), x = xx[0] .. xx[1]), y = yy[0] .. yy[1]);
    integral(integral(d/dy(φ(x, y)[3])*d/dx(φ(x, y)[1]), x = xx[0] .. xx[1]), y = yy[0] .. yy[1]);
    integral(integral(d/dy(φ(x, y)[3])*d/dx(φ(x, y)[2]), x = xx[0] .. xx[1]), y = yy[0] .. yy[1]);
    integral(integral(d/dy(φ(x, y)[3])*d/dx(φ(x, y)[3]), x = xx[0] .. xx[1]), y = yy[0] .. yy[1])
]
Kx32
Kx33
Kx34
Kx41
Kx42
Kx43
Kx44
# четырехугольник:
xq := [0; 150; 150; 0]
yq := [0; 0; 100; 100]
x(ξ, η, x1, y1, x2, y2, x3, y3, x4, y4) := (1 - ξ)*(1 - η)*x1 + ξ*(1 - η)*x2 + ξ*η*x3 + (1 - ξ)*η*x4
y(ξ, η, x1, y1, x2, y2, x3, y3, x4, y4) := (1 - ξ)*(1 - η)*y1 + ξ*(1 - η)*y2 + ξ*η*y3 + (1 - ξ)*η*y4
d/dξ(x(ξ, η, x1, y1, x2, y2, x3, y3, x4, y4)) → x1*(η - 1) - x2*(η - 1) + η*x3 - η*x4
d/dξ(y(ξ, η, x1, y1, x2, y2, x3, y3, x4, y4)) → y1*(η - 1) - y2*(η - 1) + η*y3 - η*y4
d/dη(x(ξ, η, x1, y1, x2, y2, x3, y3, x4, y4)) → x1*(ξ - 1) - x4*(ξ - 1) - ξ*x2 + ξ*x3
d/dη(y(ξ, η, x1, y1, x2, y2, x3, y3, x4, y4)) → y1*(ξ - 1) - y4*(ξ - 1) - ξ*y2 + ξ*y3
J(ξ, η, x1, y1, x2, y2, x3, y3, x4, y4) := [
    d/dξ(x(ξ, η, x1, y1, x2, y2, x3, y3, x4, y4)), d/dξ(y(ξ, η, x1, y1, x2, y2, x3, y3, x4, y4));
    d/dη(x(ξ, η, x1, y1, x2, y2, x3, y3, x4, y4)), d/dη(y(ξ, η, x1, y1, x2, y2, x3, y3, x4, y4))
]
|J(ξ, η, x1, y1, x2, y2, x3, y3, x4, y4)| collect, ξ, η → (x3*y1 - x1*y3 + x1*y4 + x2*y3 - x3*y2 - x4*y1 - x2*y4 + x4*y2)*ξ + (x2*y1 - x1*y2 + x1*y3 - x3*y1 - x2*y4 + x4*y2 + x3*y4 - x4*y3)*η + x1*y2 - x2*y1 - x1*y4 + x4*y1 + x2*y4 - x4*y2
# Интегралы в шаблонных координатах
β1 := xq[3] - xq[0]
β2 := xq[1] - xq[0]
β3 := yq[3] - yq[0]
α0 := (xq[1] - xq[0])*(yq[3] - yq[1]) - (yq[1] - yq[0])*(xq[3] - xq[0]) = 15000
β4 := yq[1] - yq[0]
β5 := xq[0] - xq[1] + xq[2] - xq[3]
β6 := yq[0] - yq[1] + yq[2] - yq[3]
α1 := (xq[1] - xq[0])*(yq[3] - yq[2]) - (yq[1] - yq[0])*(xq[2] - xq[3]) = 0
W1_ksi(ξ) := 1 - ξ
W2_ksi(ξ) := ξ
α2 := (yq[3] - yq[0])*(xq[2] - xq[1]) - (xq[3] - xq[0])*(yq[2] - yq[1]) = 0
W1_eta(η) := 1 - η
W2_eta(η) := η
detJ(ξ, η) := α0 + α1*ξ + α2*η
φ1t(ξ, η) := W1_ksi(ξ)*W1_eta(η)
φ2t(ξ, η) := W2_ksi(ξ)*W1_eta(η)
φ3t(ξ, η) := W2_ksi(ξ)*W2_eta(η)
φ4t(ξ, η) := W1_ksi(ξ)*W2_eta(η)
Kx11 := integral(integral(((d/dξ(φ3t(ξ, η)))*(β6*ξ + β3) - (d/dη(φ3t(ξ, η)))*(β6*ξ + β4))*((d/dξ(φ1t(ξ, η)))*(β6*ξ + β3) - (d/dη(φ1t(ξ, η)))*(β6*ξ + β4))*1/detJ(ξ, η), ξ = 0 .. 1), η = 0 .. 1) = -0.111111
Ky11 := integral(integral(((-d/dξ(φ1t(ξ, η)))*(β5*ξ + β1) + (d/dη(φ1t(ξ, η)))*(β5*ξ + β2))*((-d/dξ(φ1t(ξ, η)))*(β5*ξ + β1) + (d/dη(φ1t(ξ, η)))*(β5*ξ + β2))*1/detJ(ξ, η), ξ = 0 .. 1), η = 0 .. 1) = 0.5
Kxy11 := integral(integral(((d/dξ(φ1t(ξ, η)))*(β6*ξ + β3) - (d/dη(φ1t(ξ, η)))*(β6*ξ + β4))*((-d/dξ(φ1t(ξ, η)))*(β5*ξ + β1) + (d/dη(φ1t(ξ, η)))*(β5*ξ + β2))*1/detJ(ξ, η), ξ = 0 .. 1), η = 0 .. 1) = 0.25
Kyx11 := integral(integral(((-d/dξ(φ1t(ξ, η)))*(β5*ξ + β1) + (d/dη(φ1t(ξ, η)))*(β5*ξ + β2))*((d/dξ(φ1t(ξ, η)))*(β6*ξ + β3) - (d/dη(φ1t(ξ, η)))*(β6*ξ + β4))*1/detJ(ξ, η), ξ = 0 .. 1), η = 0 .. 1) = 0.25
gp_local := [-0.77459666; 0; 0.77459666]
gw := [5/9; 8/9; 5/9]
grad3x(ξ, η) := (d/dξ(φ3t(ξ, η)))*(β6*ξ + β3) - (d/dη(φ3t(ξ, η)))*(β6*ξ + β4)
grad4x(ξ, η) := (d/dξ(φ1t(ξ, η)))*(β6*ξ + β3) - (d/dη(φ1t(ξ, η)))*(β6*ξ + β4)
grady(ξ, η) := (-d/dξ(φ4t(ξ, η)))*(β5*ξ + β1) + (d/dη(φ4t(ξ, η)))*(β5*ξ + β2)
ξ := (gp_local + 1)/2 = [0.112702; 0.5; 0.887298]
η := (gp_local + 1)/2 = [0.112702; 0.5; 0.887298]
Kxy11 := 1/4*sum(sum(gw[i]*gw[j]*gradx(ξ[i], η[j])*grady(ξ[i], η[j])/detJ(ξ[i], η[j]), j = 0 .. 2), i = 0 .. 2) = 0.25  # error: This variable is undefined.
Kyx11 := 1/4*sum(sum(gw[i]*gw[j]*grady(ξ[i], η[j])*gradx(ξ[i], η[j])/detJ(ξ[i], η[j]), j = 0 .. 2), i = 0 .. 2) = 0.25  # error: This variable is undefined.
Ky11 := 1/4*sum(sum(gw[i]*gw[j]*grady(ξ[i], η[j])*grady(ξ[i], η[j])/detJ(ξ[i], η[j]), j = 0 .. 2), i = 0 .. 2) = 0.5
Kx11 := 1/4*sum(sum(gw[i]*gw[j]*grad3x(ξ[i], η[j])*grad4x(ξ[i], η[j])/detJ(ξ[i], η[j]), j = 0 .. 2), i = 0 .. 2) = -0.111111
Kx[11] = -0.222222
Ky[11] = 0.25
Kxy[11] = 0.25
Kyx[11] = -0.25
E := 2.1*10^5
μ := 0.3
h := 3  # м
D := E/(1 - μ^2)*[1, μ, 0; μ, 1, 0; 0, 0, (1 - μ)/2] = [230769, 69230.8, 0; 69230.8, 230769, 0; 0, 0, 80769.2]
Ae := h*[
    D[0, 0]*Kx[0] + D[2, 2]*Ky[0], D[0, 1]*Kxy[0] + D[2, 2]*Kyx[0], D[0, 0]*Kx[1] + D[2, 2]*Ky[1], D[0, 1]*Kxy[1] + D[2, 2]*Kyx[1], D[0, 0]*Kx[2] + D[2, 2]*Ky[2], D[0, 1]*Kxy[2] + D[2, 2]*Kyx[2], D[0, 0]*Kx[3] + D[2, 2]*Ky[3], D[0, 1]*Kxy[3] + D[2, 2]*Kyx[3];
    D[1, 0]*Kyx[0] + D[2, 2]*Kxy[0], D[2, 2]*Kx[0] + D[1, 1]*Ky[0], D[1, 0]*Kyx[1] + D[2, 2]*Kxy[1], D[2, 2]*Kx[1] + D[1, 1]*Ky[1], D[1, 0]*Kyx[2] + D[2, 2]*Kxy[2], D[2, 2]*Kx[2] + D[1, 1]*Ky[2], D[1, 0]*Kyx[3] + D[2, 2]*Kxy[3], D[2, 2]*Kx[3] + D[1, 1]*Ky[3];
    D[0, 0]*Kx[4] + D[2, 2]*Ky[4], D[0, 1]*Kxy[4] + D[2, 2]*Kyx[4], D[0, 0]*Kx[5] + D[2, 2]*Ky[5], D[0, 1]*Kxy[5] + D[2, 2]*Kyx[5], D[0, 0]*Kx[6] + D[2, 2]*Ky[6], D[0, 1]*Kxy[6] + D[2, 2]*Kyx[6], D[0, 0]*Kx[7] + D[2, 2]*Ky[7], D[0, 1]*Kxy[7] + D[2, 2]*Kyx[7];
    D[1, 0]*Kyx[4] + D[2, 2]*Kxy[4], D[2, 2]*Kx[4] + D[1, 1]*Ky[4], D[1, 0]*Kyx[5] + D[2, 2]*Kxy[5], D[2, 2]*Kx[5] + D[1, 1]*Ky[5], D[1, 0]*Kyx[6] + D[2, 2]*Kxy[6], D[2, 2]*Kx[6] + D[1, 1]*Ky[6], D[1, 0]*Kyx[7] + D[2, 2]*Kxy[7], D[2, 2]*Kx[7] + D[1, 1]*Ky[7];
    D[0, 0]*Kx[8] + D[2, 2]*Ky[8], D[0, 1]*Kxy[8] + D[2, 2]*Kyx[8], D[0, 0]*Kx[9] + D[2, 2]*Ky[9], D[0, 1]*Kxy[9] + D[2, 2]*Kyx[9], D[0, 0]*Kx[10] + D[2, 2]*Ky[10], D[0, 1]*Kxy[10] + D[2, 2]*Kyx[10], D[0, 0]*Kx[11] + D[2, 2]*Ky[11], D[0, 1]*Kxy[11] + D[2, 2]*Kyx[11];
    D[1, 0]*Kyx[8] + D[2, 2]*Kxy[8], D[2, 2]*Kx[8] + D[1, 1]*Ky[8], D[1, 0]*Kyx[9] + D[2, 2]*Kxy[9], D[2, 2]*Kx[9] + D[1, 1]*Ky[9], D[1, 0]*Kyx[10] + D[2, 2]*Kxy[10], D[2, 2]*Kx[10] + D[1, 1]*Ky[10], D[1, 0]*Kyx[11] + D[2, 2]*Kxy[11], D[2, 2]*Kx[11] + D[1, 1]*Ky[11];
    D[0, 0]*Kx[12] + D[2, 2]*Ky[12], D[0, 1]*Kxy[12] + D[2, 2]*Kyx[12], D[0, 0]*Kx[13] + D[2, 2]*Ky[13], D[0, 1]*Kxy[13] + D[2, 2]*Kyx[13], D[0, 0]*Kx[14] + D[2, 2]*Ky[14], D[0, 1]*Kxy[14] + D[2, 2]*Kyx[14], D[0, 0]*Kx[15] + D[2, 2]*Ky[15], D[0, 1]*Kxy[15] + D[2, 2]*Kyx[15];
    D[1, 0]*Kyx[12] + D[2, 2]*Kxy[12], D[2, 2]*Kx[12] + D[1, 1]*Ky[12], D[1, 0]*Kyx[13] + D[2, 2]*Kxy[13], D[2, 2]*Kx[13] + D[1, 1]*Ky[13], D[1, 0]*Kyx[14] + D[2, 2]*Kxy[14], D[2, 2]*Kx[14] + D[1, 1]*Ky[14], D[1, 0]*Kyx[15] + D[2, 2]*Kxy[15], D[2, 2]*Kx[15] + D[1, 1]*Ky[15]
]
fix_nodes := [1; 2]
Ae = [
    275000, 112500, -93269.2, -8653.85, -137500, -112500, -44230.8, 8653.85;
    112500, 400000, 8653.85, 119231, -112500, -200000, -8653.85, -319231;
    -93269.2, 8653.85, 275000, -112500, -44230.8, -8653.85, -137500, 112500;
    -8653.85, 119231, -112500, 400000, 8653.85, -319231, 112500, -200000;
    -137500, -112500, -44230.8, 8653.85, 275000, 112500, -93269.2, -8653.85;
    -112500, -200000, -8653.85, -319231, 112500, 400000, 8653.85, 119231;
    -44230.8, -8653.85, -137500, 112500, -93269.2, 8653.85, 275000, -112500;
    8653.85, -319231, 112500, -200000, -8653.85, 119231, -112500, 400000
]
i := 0 .. 7
Ae[2*fix_nodes[0], i] := 0
Ae[2*fix_nodes[1], i] := 0
Ae[i, 2*fix_nodes[0]] := 0
Ae[i, 2*fix_nodes[1]] := 0
rank(Ae) = 5
|Ae| = 0
Ae[2*fix_nodes[0] + 1, i] := 0
Ae[2*fix_nodes[1] + 1, i] := 0
Ae[i, 2*fix_nodes[0] + 1] := 0
Ae[i, 2*fix_nodes[1] + 1] := 0
Ae[2*fix_nodes[0], 2*fix_nodes[0]] := 1
Ae[2*fix_nodes[1], 2*fix_nodes[1]] := 1
Ae[2*fix_nodes[1] + 1, 2*fix_nodes[1] + 1] := 1
Ae[2*fix_nodes[0] + 1, 2*fix_nodes[0] + 1] := 1
Px := -1000  # Н/м
loaded_nodes := [0; 3]
Ae = [
    275000, 112500, 0, 0, 0, 0, -44230.8, 8653.85;
    112500, 400000, 0, 0, 0, 0, -8653.85, -319231;
    0, 0, 1, 0, 0, 0, 0, 0;
    0, 0, 0, 1, 0, 0, 0, 0;
    0, 0, 0, 0, 1, 0, 0, 0;
    0, 0, 0, 0, 0, 1, 0, 0;
    -44230.8, -8653.85, 0, 0, 0, 0, 275000, -112500;
    8653.85, -319231, 0, 0, 0, 0, -112500, 400000
]
I1 := integral(Y1(y), y = yy[0] .. yy[1]) = 50
I2 := integral(Y2(y), y = yy[0] .. yy[1]) = 50
|Ae| = 1.72353e21
Y2(yy[0]) = 0
Y2(3) = 0.03
b := [Px*I1; 0; 0; 0; 0; 0; Px*I2; 0] = [-50000; 0; 0; 0; 0; 0; -50000; 0]
sum(b[i], i = 0 .. 7) = -100000
u := Ae^-1*b
u = [-0.231722; 0.0334572; 0; 0; 0; 0; -0.231722; -0.0334572]
